*Heading
** Job name: Job-1 Model name: Model-1
** Generated by: Abaqus/CAE 2017
*Preprint, echo=NO, model=NO, history=NO, contact=NO
**
** PARTS
**
*Part, name=pile
*Node
      1,          10.,           5.,           4.
      2,          10.,           4.,           4.
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*Element, type=C3D8
  1,  31,  32,  38,  37,   1,   2,   8,   7
  2,  32,  33,  39,  38,   2,   3,   9,   8
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*Nset, nset=Set-1, generate
   1,  330,    1
*Elset, elset=Set-1, generate
   1,  200,    1
** Section: Section-1
*Solid Section, elset=Set-1, material=Material-1
,
*End Part
**
**
** ASSEMBLY
**
*Assembly, name=Assembly
**
*Instance, name=pile-1, part=pile
*End Instance
**
*Nset, nset=Set-1, instance=pile-1
 1,
*Nset, nset=Set-2, instance=pile-1, generate
 301,  330,    1
*Elset, elset=Set-2, instance=pile-1, generate
 181,  200,    1
*End Assembly
**
** MATERIALS
**
*Material, name=Material-1
*Elastic
 6e+08, 0.3
** ----------------------------------------------------------------
**
** STEP: Step-1
**
*Step, name=Step-1, nlgeom=NO
*Static
1., 1., 1e-05, 1.
**
** BOUNDARY CONDITIONS
**
** Name: BC-1 Type: Displacement/Rotation
*Boundary
Set-2, 1, 1
Set-2, 2, 2
Set-2, 3, 3
**
** LOADS
**
** Name: Load-1   Type: Concentrated force
*Cload
Set-1, 1, 2300.
**
** OUTPUT REQUESTS
**
*Restart, write, frequency=0
**
** FIELD OUTPUT: F-Output-1
**
*Output, field, variable=PRESELECT
**
** HISTORY OUTPUT: H-Output-1
**
*Output, history, variable=PRESELECT
*End Step
